// SBML level 3 version 2
// Created with https://github.com/matthiaskoenig/sbmlutils.

model dulaglutide_intestine(Vext, Vgu, Vlumen, Vfeces, Vstomach, dm_lumen, dm_feces)
  // Model for dulaglutide absorption
  // Model for dulaglutide absorption and fecal excretion
  // The content of this model has been carefully created in a manual research effort.
  // Terms of use
  // Copyright © 2026 Matthias König.
  // This work is licensed under a Creative Commons Attribution 4.0 International License.
  // Redistribution and use of any part of this model, with or without modification, are permitted provided that the following conditions are met:
  // Redistributions of this SBML file must retain the above copyright notice, this list of conditions and the following disclaimer.
  // Redistributions in a different form must reproduce the above copyright notice, this list of conditions and the following disclaimer in the documentation and/or other materials provided with the distribution.
  // This model is distributed in the hope that it will be useful, but WITHOUT ANY WARRANTY; without even the implied warranty of MERCHANTABILITY or FITNESS FOR A PARTICULAR PURPOSE.
  // hasTaxon taxonomy:9606 snomedct:337915000
  // hasProperty mamo:MAMO_0000046 ncit:C82239 ncit:C98085 ncit:C15299 ncit:C2985 ncit:C99532
  // isDescribedBy doi:10.5281/zenodo.14761114
  // occursIn FMA:45615 BTO:0000545 ncit:C12736 FMA:7199 BTO:0000648
  // model units - substance: mmole, time: min, volume: litre, area: m2, length: metre, extent: mmole

  // Compartments:
  compartment Vext = 1 litre; Vext is "plasma";  // SBO:0000290 ncit:C13356 BTO:0000131
  compartment Vgu = 1.2825 litre; Vgu is "intestine";  // SBO:0000290 FMA:45615 BTO:0000545 ncit:C12736
  compartment Vlumen = 1.15425 litre; Vlumen is "intestinal lumen (inner part of intestine)";  // SBO:0000290 FMA:14586 UBERON:0018543
  compartment Vfeces = 1 litre;  // SBO:0000290 FMA:64183 ncit:C13234 BTO:0000440
  compartment Ventero = 0.12825 litre; Ventero is "intestinal lining (enterocytes)";  // SBO:0000290
  compartment Vapical = NaN; Vapical has m2; Vapical is "apical membrane (intestinal membrane enterocytes)";  // 2-D; SBO:0000290 FMA:84666 GO:0016324
  compartment Vbaso = NaN; Vbaso has m2; Vbaso is "basolateral membrane (intestinal membrane enterocytes)";  // 2-D; SBO:0000290 FMA:84669 GO:0016323
  compartment Vstomach = 1 litre;  // SBO:0000290 FMA:7148 ncit:C12391 UBERON:0000945
  compartment Vint_0; Vint_0 has litre; Vint_0 is "intestinal lumen (inner part of intestine)";  // SBO:0000290 FMA:14586 UBERON:0018543
  compartment Vint_1; Vint_1 has litre; Vint_1 is "intestinal lumen (inner part of intestine)";  // SBO:0000290 FMA:14586 UBERON:0018543
  compartment Vint_2; Vint_2 has litre; Vint_2 is "intestinal lumen (inner part of intestine)";  // SBO:0000290 FMA:14586 UBERON:0018543
  compartment Vint_3; Vint_3 has litre; Vint_3 is "intestinal lumen (inner part of intestine)";  // SBO:0000290 FMA:14586 UBERON:0018543
  compartment Vint_4; Vint_4 has litre; Vint_4 is "intestinal lumen (inner part of intestine)";  // SBO:0000290 FMA:14586 UBERON:0018543

  // Species:
  species dm_lumen in Vlumen = 0; dm_lumen is "dulaglutide metabolite (intestinal volume)";  // SBO:0000247
  substanceOnly species dm_feces in Vfeces = 0; dm_feces is "dulaglutide (feces)";  // SBO:0000247
  species dm_int_0 in Vint_0 = 0; dm_int_0 is "dulaglutide (intestine) 0";  // SBO:0000247
  species dm_int_1 in Vint_1 = 0; dm_int_1 is "dulaglutide (intestine) 1";  // SBO:0000247
  species dm_int_2 in Vint_2 = 0; dm_int_2 is "dulaglutide (intestine) 2";  // SBO:0000247
  species dm_int_3 in Vint_3 = 0; dm_int_3 is "dulaglutide (intestine) 3";  // SBO:0000247
  species dm_int_4 in Vint_4 = 0; dm_int_4 is "dulaglutide (intestine) 4";  // SBO:0000247

  // Parameters:
  Vchain = 0.1 litre; Vchain is "volume of chain compartment";  // SBO:0000009
  DMEXC_k = 0.0003920629 per_min; DMEXC_k is "rate of dulaglutide metabolite fecal excretion";  // SBO:0000009

  // Assignment rules:
  Vint_0 := Vchain;
  Vint_1 := Vchain;
  Vint_2 := Vchain;
  Vint_3 := Vchain;
  Vint_4 := Vchain;

  // Reactions:
  dmEXC: dm_lumen => dm_int_0; DMEXC_k*Vgu*dm_lumen; dmEXC is "excretion dulaglutide metabolite (feces)";  // SBO:0000655
  dmEXC_0: dm_int_0 => dm_int_1; DMEXC_k*Vint_0*dm_int_0; dmEXC_0 is "excretion dulaglutide metabolite 0";  // SBO:0000655
  dmEXC_1: dm_int_1 => dm_int_2; DMEXC_k*Vint_1*dm_int_1; dmEXC_1 is "excretion dulaglutide metabolite 1";  // SBO:0000655
  dmEXC_2: dm_int_2 => dm_int_3; DMEXC_k*Vint_2*dm_int_2; dmEXC_2 is "excretion dulaglutide metabolite 2";  // SBO:0000655
  dmEXC_3: dm_int_3 => dm_int_4; DMEXC_k*Vint_3*dm_int_3; dmEXC_3 is "excretion dulaglutide metabolite 3";  // SBO:0000655
  dmEXC_4: dm_int_4 => dm_feces; DMEXC_k*Vint_4*dm_int_4; dmEXC_4 is "excretion dulaglutide metabolite 4";  // SBO:0000655

  // Unit definitions:
  unit g_per_mole = gram / mole; g_per_mole is "g/mole";
  unit l_per_min = litre / (60 second); l_per_min is "l/min";
  unit m2 = metre^2; m2 is "meter^2";
  unit mM = 1e-3 mole / litre; mM is "mmole/liter";
  unit mg = 1e-3 gram;
  unit mg_per_min = 1e-3 gram / (60 second); mg_per_min is "mg/min";
  unit mg_per_s_l = 1e-3 gram / (second * litre); mg_per_s_l is "mg/s/l";
  unit min = 60 second;
  unit min_per_hr = 60 second / (3600 second); min_per_hr is "min/hour";
  unit mmole = 1e-3 mole;
  unit mmole_per_min = 1e-3 mole / (60 second); mmole_per_min is "mmole/min";
  unit mmole_per_min_l = 1e-3 mole / (60 second * litre); mmole_per_min_l is "mmole/min/l";
  unit per_hr = 1 / (3600 second); per_hr is "1/hr";
  unit per_min = 1 / (60 second); per_min is "1/min";
  unit per_mmole = 1 / (1e-3 mole); per_mmole is "1/mmole";
end
