// SBML level 3 version 2
// Created with https://github.com/matthiaskoenig/sbmlutils.

model dulaglutide_kidney(Vext, Vki, Vurine, dm_ext, dm_urine)
  // Model for renal dulaglutide excretion.
  // version 1
  // The content of this model has been carefully created in a manual research effort.
  // Terms of use
  // Copyright © 2026 Matthias König.
  // This work is licensed under a Creative Commons Attribution 4.0 International License.
  // Redistribution and use of any part of this model, with or without modification, are permitted provided that the following conditions are met:
  // Redistributions of this SBML file must retain the above copyright notice, this list of conditions and the following disclaimer.
  // Redistributions in a different form must reproduce the above copyright notice, this list of conditions and the following disclaimer in the documentation and/or other materials provided with the distribution.
  // This model is distributed in the hope that it will be useful, but WITHOUT ANY WARRANTY; without even the implied warranty of MERCHANTABILITY or FITNESS FOR A PARTICULAR PURPOSE.
  // hasTaxon taxonomy:9606 snomedct:337915000
  // hasProperty mamo:MAMO_0000046 ncit:C82239 ncit:C98085 ncit:C15299 ncit:C2985 ncit:C99532
  // isDescribedBy doi:10.5281/zenodo.14761114
  // occursIn FMA:7203 BTO:0000671 ncit:C12415
  // model units - substance: mmole, time: min, volume: litre, area: m2, length: metre, extent: mmole

  // Compartments:
  compartment Vext = 1.5 litre; Vext is "plasma";  // SBO:0000290 ncit:C13356 BTO:0000131
  compartment Vki = 0.3 litre; Vki is "kidney";  // SBO:0000290 FMA:7203 BTO:0000671 ncit:C12415
  compartment Vmem = NaN; Vmem has m2; Vmem is "plasma membrane";  // 2-D; SBO:0000290 ncit:C13735 FMA:63841 GO:0005886
  compartment Vurine = 1 litre;  // SBO:0000290 FMA:12274 ncit:C13283 BTO:0001419

  // Species:
  species dm_ext in Vext = 0; dm_ext is "dulaglutide metabolites (plasma)";  // SBO:0000247
  substanceOnly species dm_urine in Vurine = 0; dm_urine is "dulaglutide metabolites (urine)";  // SBO:0000247

  // Parameters:
  // scaling factor for renal function. 1.0: normal renal function; <1.0: reduced renal function; >1.0: increased renal function.
  f_renal_function = 1 dimensionless; f_renal_function is "parameter for renal function";  // SBO:0000009
  DMEX_k = 0.1 per_min; DMEX_k is "rate urinary excretion of dulaglutide";  // SBO:0000009

  // Reactions:
  DMEX: dm_ext -> dm_urine; f_renal_function*DMEX_k*Vki*dm_ext; DMEX is "dulaglutide metabolite excretion (DMEX)";  // SBO:0000655

  // Unit definitions:
  unit g_per_mole = gram / mole; g_per_mole is "g/mole";
  unit l_per_min = litre / (60 second); l_per_min is "l/min";
  unit m2 = metre^2; m2 is "meter^2";
  unit mM = 1e-3 mole / litre; mM is "mmole/liter";
  unit mg = 1e-3 gram;
  unit mg_per_s_l = 1e-3 gram / (second * litre); mg_per_s_l is "mg/s/l";
  unit min = 60 second;
  unit min_per_hr = 60 second / (3600 second); min_per_hr is "min/hour";
  unit mmole = 1e-3 mole;
  unit mmole_per_min = 1e-3 mole / (60 second); mmole_per_min is "mmole/min";
  unit mmole_per_min_l = 1e-3 mole / (60 second * litre); mmole_per_min_l is "mmole/min/l";
  unit per_min = 1 / (60 second); per_min is "1/min";
  unit per_mmole = 1 / (1e-3 mole); per_mmole is "1/mmole";
end
