// SBML level 3 version 2
// Created with https://github.com/matthiaskoenig/sbmlutils.

model dulaglutide_liver(Vext, Vli, Vbi, Vlumen, dm_ext, dm_lumen)
  // Model for hepatic dulaglutide enterohepatic circulation.
  // Model for dulaglutide enterohepatic circulation.
  // The content of this model has been carefully created in a manual research effort.
  // Terms of use
  // Copyright © 2026 Matthias König.
  // This work is licensed under a Creative Commons Attribution 4.0 International License.
  // Redistribution and use of any part of this model, with or without modification, are permitted provided that the following conditions are met:
  // Redistributions of this SBML file must retain the above copyright notice, this list of conditions and the following disclaimer.
  // Redistributions in a different form must reproduce the above copyright notice, this list of conditions and the following disclaimer in the documentation and/or other materials provided with the distribution.
  // This model is distributed in the hope that it will be useful, but WITHOUT ANY WARRANTY; without even the implied warranty of MERCHANTABILITY or FITNESS FOR A PARTICULAR PURPOSE.
  // hasTaxon taxonomy:9606 snomedct:337915000
  // hasProperty mamo:MAMO_0000046 ncit:C82239 ncit:C98085 ncit:C15299 ncit:C2985 ncit:C99532
  // isDescribedBy doi:10.5281/zenodo.14761114
  // occursIn FMA:7197 BTO:0000759 ncit:C12392
  // model units - substance: mmole, time: min, volume: litre, area: m2, length: metre, extent: mmole

  // Compartments:
  compartment Vext = 1.5 litre; Vext is "plasma";  // SBO:0000290 ncit:C13356 BTO:0000131
  compartment Vli = 1.5 litre; Vli is "liver";  // SBO:0000290 FMA:7197 BTO:0000759 ncit:C12392
  compartment Vmem = NaN; Vmem has m2; Vmem is "plasma membrane";  // 2-D; SBO:0000290 ncit:C13735 FMA:63841 GO:0005886
  compartment Vapical = NaN; Vapical has m2; Vapical is "apical membrane";  // 2-D; SBO:0000290 FMA:84666 GO:0016324
  compartment Vbi = 1 litre; Vbi is "bile";  // SBO:0000290 FMA:62971 ncit:C13192
  compartment Vlumen = 1.15425 litre; Vlumen is "intestinal lumen (inner part of intestine)";  // SBO:0000290 FMA:14586 UBERON:0018543

  // Species:
  species dm_ext in Vext = 0; dm_ext is "dulaglutide metabolites (plasma)";  // SBO:0000247
  species dm in Vli = 0; dm is "dulaglutide metabolites (liver)";  // SBO:0000247
  // Bile dulaglutide in amount.
  substanceOnly species dm_bi in Vbi = 0; dm_bi is "dulaglutide metabolites (bile)";  // SBO:0000247
  species dm_lumen in Vlumen = 0; dm_lumen is "dulaglutide metabolites (lumen)";  // SBO:0000247

  // Parameters:
  DMEX_k = 0.003949308 per_min; DMEX_k is "rate for DM transport";  // SBO:0000009

  // Reactions:
  DMIM: dm_ext => dm; DMEX_k*Vli*dm_ext; DMIM is "dulaglutide import (DMIM)";  // SBO:0000655
  DMEX: dm => dm_bi; DMIM; DMEX is "dulaglutide bile export";  // SBO:0000655
  DMEHC: dm_bi => dm_lumen; DMIM; DMEHC is "dulaglutide enterohepatic circulation";  // SBO:0000655

  // Unit definitions:
  unit g_per_mole = gram / mole; g_per_mole is "g/mole";
  unit l_per_min = litre / (60 second); l_per_min is "l/min";
  unit m2 = metre^2; m2 is "meter^2";
  unit mM = 1e-3 mole / litre; mM is "mmole/liter";
  unit mg = 1e-3 gram;
  unit mg_per_s_l = 1e-3 gram / (second * litre); mg_per_s_l is "mg/s/l";
  unit min = 60 second;
  unit min_per_hr = 60 second / (3600 second); min_per_hr is "min/hour";
  unit mmole = 1e-3 mole;
  unit mmole_per_min = 1e-3 mole / (60 second); mmole_per_min is "mmole/min";
  unit mmole_per_min_l = 1e-3 mole / (60 second * litre); mmole_per_min_l is "mmole/min/l";
  unit per_min = 1 / (60 second); per_min is "1/min";
  unit per_mmole = 1 / (1e-3 mole); per_mmole is "1/mmole";
end
