// SBML level 3 version 2
// Created with https://github.com/matthiaskoenig/sbmlutils.

model bodyweight()
  // Model for bodyweight changes.
  // version 1
  // The content of this model has been carefully created in a manual research effort.
  // Terms of use
  // Copyright © 2026 Matthias König.
  // This work is licensed under a Creative Commons Attribution 4.0 International License.
  // Redistribution and use of any part of this model, with or without modification, are permitted provided that the following conditions are met:
  // Redistributions of this SBML file must retain the above copyright notice, this list of conditions and the following disclaimer.
  // Redistributions in a different form must reproduce the above copyright notice, this list of conditions and the following disclaimer in the documentation and/or other materials provided with the distribution.
  // This model is distributed in the hope that it will be useful, but WITHOUT ANY WARRANTY; without even the implied warranty of MERCHANTABILITY or FITNESS FOR A PARTICULAR PURPOSE.
  // hasProperty ncit:C81328 mamo:MAMO_0000046
  // hasTaxon snomedct:337915000 taxonomy:9606
  // model units - substance: mmole, time: min, volume: litre, area: m2, length: metre, extent: mmole

  // Parameters:
  BW0 = 75 kg; BW0 is "bodyweight";  // SBO:0000002
  BW has kg; BW is "bodyweight";  // SBO:0000002
  // Absolute change to baseline bodyweight
  BW_change has kg; BW_change is "bodyweight change";
  // Ratio relative to baseline bodyweight
  BW_ratio has dimensionless; BW_ratio is "bodyweight ratio";
  // Change relative to baseline bodyweight
  BW_relchange has dimensionless; BW_relchange is "bodyweight relative change";
  FAT has kg; FAT is "additional fat to LBM [kg]";  // SBO:0000002
  DFAT = 0 kg; DFAT is "change in additional fat to LBM [kg]";  // SBO:0000002
  HEIGHT = 170 cm; HEIGHT is "height [cm]";  // SBO:0000002
  // Flag to switch sex in model: 0: male, 1: female,
  SEX = 0 dimensionless; SEX is "sex";  // SBO:0000002
  conversion_cm_per_m = 100 cm_per_m; conversion_cm_per_m is "Conversion factor cm to m";  // SBO:0000002
  D = 0 mM; D is "GLP-1 agonist concentration in plasma";  // SBO:0000002
  // Adjusted to match clinical weight loss rates:
  // Typical weight loss: 2-4 kg over 26 weeks
  // Rate: ~1.5e-4 kg/min at steady state
  // Emax accounts for maximum effect at saturating drug concentrations
  Emax_FAT = 1e-5 per_min; Emax_FAT is "Emax for GLP-1 agonist on fat loss (rate of fat change)";  // SBO:0000002
  gamma_FAT = 1 dimensionless; gamma_FAT is "gamma for GLP-1 agonist on fat loss";  // SBO:0000002
  // Adjusted to physiologically relevant range:
  // Typical dulaglutide Cmax: 10-100 ng/mL after 0.75-1.5 mg dose
  // Converted to molar: ~3-30 µM (3e-6 to 3e-5 mM)
  // EC50 set to mid-range for reasonable dose-response
  EC50_FAT = 2.5e-5 mM; EC50_FAT is "EC50 for GLP-1 agonist on fat loss";  // SBO:0000002
  LBW0 has kg;
  FAT0 has kg;
  BSA has m2;
  BMI has kg_per_m2;

  // Assignment rules:
  BW_change := BW - BW0;
  BW_ratio := BW/BW0;
  BW_relchange := (BW - BW0)/BW0;
  // Boer Formula (uses weight and height)
  // For males: LBM=0.407×W+0.267×H−19.2
  // For females: LBM=0.252×W+0.473×H−48.3
  // Where W is weight in kilograms and H is height in centimeters
  // FIXME: This formula most likely does not work for small bodyweights
  LBW0 := 0.407*BW0 + 0.267 kg_per_cm*HEIGHT - (19.2 kg);
  FAT0 := BW0 - LBW0;
  FAT := FAT0 + DFAT;
  BW := LBW0 + FAT;
  BSA := 0.024265 m2*(BW/(1 kg))^0.5378*(HEIGHT/(1 cm))^0.3964;
  BMI := BW/(HEIGHT/conversion_cm_per_m*HEIGHT/conversion_cm_per_m);

  // Rate rules:
  DFAT' = -FAT*Emax_FAT*D^gamma_FAT/(D^gamma_FAT + EC50_FAT^gamma_FAT);

  // Unit definitions:
  unit cm = 0.01 metre;
  unit cm_per_m = 0.01 metre / metre; cm_per_m is "cm/m";
  unit g_per_mole = gram / mole; g_per_mole is "g/mole";
  unit hr = 3600 second;
  unit kg = 1000 gram;
  unit kg_per_cm = 1000 gram / (0.01 metre); kg_per_cm is "kg/cm";
  unit kg_per_m2 = 1000 gram / metre^2; kg_per_m2 is "kg/meter^2";
  unit kg_per_min = 1000 gram / (60 second); kg_per_min is "kg/min";
  unit l_per_min = litre / (60 second); l_per_min is "l/min";
  unit m2 = metre^2; m2 is "meter^2";
  unit m2_per_kg = metre^2 / (1000 gram); m2_per_kg is "meter^2/kg";
  unit mM = 1e-3 mole / litre; mM is "mmole/liter";
  unit mg = 1e-3 gram;
  unit mg_per_s_l = 1e-3 gram / (second * litre); mg_per_s_l is "mg/s/l";
  unit min = 60 second;
  unit min_per_hr = 60 second / (3600 second); min_per_hr is "min/hour";
  unit mmole = 1e-3 mole;
  unit mmole_per_min = 1e-3 mole / (60 second); mmole_per_min is "mmole/min";
  unit mmole_per_min_l = 1e-3 mole / (60 second * litre); mmole_per_min_l is "mmole/min/l";
  unit per_min = 1 / (60 second); per_min is "1/min";
  unit per_mmole = 1 / (1e-3 mole); per_mmole is "1/mmole";
end
