// SBML level 3 version 2
// Created with https://github.com/matthiaskoenig/sbmlutils.

model hba1c_model(Vext)
  // Model for hba1c and FPG changes.
  // Model for hba1c changes.
  // version 2
  // moved to species and reactions
  // version 1 initial model
  // The content of this model has been carefully created in a manual research effort.
  // Terms of use
  // Copyright © 2026 Matthias König.
  // This work is licensed under a Creative Commons Attribution 4.0 International License.
  // Redistribution and use of any part of this model, with or without modification, are permitted provided that the following conditions are met:
  // Redistributions of this SBML file must retain the above copyright notice, this list of conditions and the following disclaimer.
  // Redistributions in a different form must reproduce the above copyright notice, this list of conditions and the following disclaimer in the documentation and/or other materials provided with the distribution.
  // This model is distributed in the hope that it will be useful, but WITHOUT ANY WARRANTY; without even the implied warranty of MERCHANTABILITY or FITNESS FOR A PARTICULAR PURPOSE.
  // hasTaxon snomedct:337915000 taxonomy:9606
  // hasProperty mamo:MAMO_0000046
  // model units - substance: mmole, time: min, volume: litre, area: m2, length: metre, extent: mmole

  // Compartments:
  compartment Vext = 1.5 litre; Vext is "plasma";  // SBO:0000290 ncit:C13356 BTO:0000131

  // Species:
  substanceOnly species hba1c in Vext = hba1c0; hba1c is "HbA1c";  // substance in dimensionless; conversionFactor cf_units_per_mmole; SBO:0000247; isVersionOf CHEBI:35143 ncit:C64849 efo:0004541
  species fpg in Vext = fpg0; fpg is "fasting plasma glucose (FPG)";  // SBO:0000247; isVersionOf snomedct:167096006
  substanceOnly species hb in Vext = 1 - hba1c0; hb is "Hb total";  // substance in dimensionless; conversionFactor cf_units_per_mmole; SBO:0000247 CHEBI:35143
  substanceOnly species hb_total in Vext; hb_total is "Hb total";  // substance in dimensionless; conversionFactor cf_units_per_mmole; SBO:0000247 CHEBI:35143

  // Parameters:
  cf_units_per_mmole = 1 per_mmole; cf_units_per_mmole is "conversion factor for dimensionless species";  // SBO:0000002
  hba1c0 = 0.05 dimensionless; hba1c0 is "HbA1c";  // SBO:0000002
  // Absolute change to baseline HbA1c
  hba1c_change has dimensionless; hba1c_change is "HbA1c change";
  // Ratio relative to baseline HbA1c
  hba1c_ratio has dimensionless; hba1c_ratio is "HbA1c ratio";
  // Change relative to baseline HbA1c
  hba1c_relchange has dimensionless; hba1c_relchange is "HbA1c relative change";
  fpg0 = 5 mM; fpg0 is "fasting plasma glucose (FPG)";  // SBO:0000002
  // Absolute change to baseline fasting plasma glucose (FPG)
  fpg_change has mM; fpg_change is "fasting plasma glucose (FPG) change";
  // Ratio relative to baseline fasting plasma glucose (FPG)
  fpg_ratio has dimensionless; fpg_ratio is "fasting plasma glucose (FPG) ratio";
  // Change relative to baseline fasting plasma glucose (FPG)
  fpg_relchange has dimensionless; fpg_relchange is "fasting plasma glucose (FPG) relative change";
  glp1 = 0 mM; glp1 is "GLP-1 agonist concentration in plasma";  // SBO:0000002
  E_glp1 has dimensionless; E_glp1 is "Effect of glp1";  // SBO:0000002
  EC50_glp1 = 2.5e-5 mM; EC50_glp1 is "half-maximal effective concentration";  // SBO:0000002
  // Maximum effect between 0 an 1
  Emax_glp1 = 1 dimensionless; Emax_glp1 is "maximum drug efficacy";  // SBO:0000002
  gamma_glp1 = 1 dimensionless; gamma_glp1 is "Hill coefficient";  // SBO:0000002
  fpg_healthy = 5 mM; fpg_healthy is "healthy fasting plasma glucose";  // SBO:0000002
  k_fpg = 1 l2_per_min_mmole; k_fpg is "rate normalization FPG with GLP-1 agonist";  // SBO:0000002
  // set based on turnover of erythrocytes
  k_hb_syn = 5.348358e-6 mmole_per_min; k_hb_syn is "hb synthesis rate";  // SBO:0000002
  // halflife turnover of erythrocytes of tau = 4 month k = ln(2) / (4 * 30 * 24 * 60) [1/min]
  k_hb_turn = 5.348358e-6 mmole_per_min; k_hb_turn is "hb turnover rate";  // SBO:0000002
  // set so that the HbA1c is 5% at steady state for 5 mM FPG
  k_hb_gly = 5.348358e-8 l_per_min; k_hb_gly is "hb glycation rate";  // SBO:0000002

  // Assignment rules:
  hba1c_change := hba1c - hba1c0;
  hba1c_ratio := hba1c/hba1c0;
  hba1c_relchange := (hba1c - hba1c0)/hba1c0;
  fpg_change := fpg - fpg0;
  fpg_ratio := fpg/fpg0;
  fpg_relchange := (fpg - fpg0)/fpg0;
  hb_total := hb + hba1c0;
  // Effect of GLP-1 inhibitor. Modelled via hill equation.
  E_glp1 := Emax_glp1*glp1^gamma_glp1/(EC50_glp1^gamma_glp1 + glp1^gamma_glp1);

  // Reactions:
  FPGC: fpg => ; k_fpg*glp1*(fpg - fpg_healthy); FPGC is "fpg change";  // SBO:0000176
  HBSYN: => hb; k_hb_syn; HBSYN is "HB synthesis";  // SBO:0000176
  HBDEG: hb => ; k_hb_turn*hb; HBDEG is "HB degradation";  // SBO:0000176
  HBA1CDEG: hba1c => ; k_hb_turn*hba1c; HBA1CDEG is "HBA1C degradation";  // SBO:0000176
  HBGLYC: hb => hba1c; k_hb_gly*fpg*hb; HBGLYC is "HB glycation";  // modifiers: fpg; SBO:0000176

  // Unit definitions:
  unit cm = 0.01 metre;
  unit cm_per_m = 0.01 metre / metre; cm_per_m is "cm/m";
  unit g_per_mole = gram / mole; g_per_mole is "g/mole";
  unit hr = 3600 second;
  unit kg = 1000 gram;
  unit kg_per_cm = 1000 gram / (0.01 metre); kg_per_cm is "kg/cm";
  unit kg_per_m2 = 1000 gram / metre^2; kg_per_m2 is "kg/meter^2";
  unit kg_per_min = 1000 gram / (60 second); kg_per_min is "kg/min";
  unit l2_per_min_mmole = litre^2 / (60 second * 1e-3 mole); l2_per_min_mmole is "(l*l)/(min*mmole)";
  unit l_per_min = litre / (60 second); l_per_min is "l/min";
  unit l_per_min_mmole = litre / (60 second * 1e-3 mole); l_per_min_mmole is "l/(min*mmole)";
  unit l_per_mmole = litre / (1e-3 mole); l_per_mmole is "l/mmole";
  unit m2 = metre^2; m2 is "meter^2";
  unit m2_per_kg = metre^2 / (1000 gram); m2_per_kg is "meter^2/kg";
  unit mM = 1e-3 mole / litre; mM is "mmole/liter";
  unit mg = 1e-3 gram;
  unit mg_per_s_l = 1e-3 gram / (second * litre); mg_per_s_l is "mg/s/l";
  unit min = 60 second;
  unit min_per_hr = 60 second / (3600 second); min_per_hr is "min/hour";
  unit mmole = 1e-3 mole;
  unit mmole_per_min = 1e-3 mole / (60 second); mmole_per_min is "mmole/min";
  unit mmole_per_min_l = 1e-3 mole / (60 second * litre); mmole_per_min_l is "mmole/min/l";
  unit per_min = 1 / (60 second); per_min is "1/min";
  unit per_mmole = 1 / (1e-3 mole); per_mmole is "1/mmole";
end
